# File s214BAC6.MCD | Proton at 214 MHz with 7 l/2 cable
# WITH STRAY CAPACITANCE
C_stray ≡ .001*10^-12
U := .1  # Input RF level ( 100mV)
# Constant current resistors
R := 619  # FORCE CONSTANT CURRENT
I := U/R
I = 0.000161551
R_1 := 50  # Impedance of amp
# Set coil inductance to resonate with existing C = 20 pF
r := 10  # DAMPING RESISTOR
L := 30*10^-9  # Inductance of coil
r_coil := 0.35  # RF resistance of coil
L = 3e-8
NBINS ≡ 255
L_0 := L
trim ≡ 7
# cable length
# in 1/2 wavelengths
# Set resonant frequency, MHz
f ≡ 213
ω_res := 2*π*f*10^6
C := 20*10^-12*knob  # Set capacitance to near resonance
C_pF := C*(10^12)  # Capacitance in picofarad
ω_hi := 2*π*f_high*10^6
ω_low := 2*π*f_low*10^6  # Defines the limits of the frequency sweep
δω := 2*π*(f_high - f_low)*10^6/NBINS  # Defining the size of the frequency "sweep" bins
k := 0, n .. NBINS
ω[k] := ω_low + k*δω
# Put in the cable constants calculated using file cable.mcd
α := 0.0343
β := 4.752*10^-9  # Note.. this is not traditional b, in fact = b/ω
Γ[k] := α + 1i*β*ω[k]
vel := 1/β
vel = 210437710
λ := vel/(f*10^6)
λ = 0.98797
# Example.. cable constant at resonant frequency
Γ[128] = 0.0343 + 6.35972i
# Cable length
l := trim*λ/2
l = 3.4579
trim = 7
# Cable characteristics:
S := 2*50*α
# Resistance
S = 3.43  # Ohms/m
l*S = 11.8606
D := 10.27*10^-11
# Capacitance , found from file cable.mcd
M := 2.542*10^-7
# Inductance
Z0[k] := sqrt((S + ω[k]*M*1i)/(ω[k]*D*1i))  # Complex characteristic impedance of transmission line
# Impedence of the transmission line at stages along the frequency sweep (the subscript refers to the "bin" number):
Z0[0] = 49.7517 - 0.251094i
Z0[128] = 49.7517 - 0.250798i
Z0[255] = 49.7517 - 0.250505i
ZC[k] := 1/(1i*ω[k]*C)  # Impedance of capacitance
ZCstray[k] := 1/(1i*ω[k]*C_stray)
ZLpure[k] := 1i*ω[k]*L_0 + r_coil  # Impedance of coil
ZL[k] := ZLpure[k]*ZCstray[k]/(ZLpure[k] + ZCstray[k])  # Impedance of coil and parallel stray capacitance
ZT[k] := Z0[k]*(ZL[k] + Z0[k]*tanh(Γ[k]*l))/(Z0[k] + ZL[k]*tanh(Γ[k]*l))  # Impedance of transmission line
Zleg1[k] := r + ZC[k] + ZT[k]
# Total impedance of tuning capacitor, damping
# resistor and T line
|Zleg1[0]| = 20.2182  # Impedence of the damping resistor, capacitance and cable at edges of scan
Ztotal[k] := R_1/(1 + R_1/Zleg1[k])  # Total impedance of coil, T line and amplifier impedance
|Ztotal[0]| = 14.4947
|Ztotal[128]| = 14.4131
|Ztotal[255]| = 14.4945
ϕ := phi*π/180  # Phase between constant current and output voltage
# Now calculate current which is drawn from RF | Complex output voltage in mV
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IRF[k] := U*1000/(R + Ztotal[k])
IRF[k]
IRF[128] = 0.157895 + 0.000387289i
max(ZT) = 10.3867 + 41.2782i
f_low = 212.75
f_high = 213.25
Vout[k] := I*Ztotal[k]*exp(1i*ϕ)*1000
|ZT[121]| = 40.2972
|ZT[122]| = 40.3137
arg(Zleg1[128])*180/π = -8.68101
|ZT[123]| = 40.3303
|Ztotal[128]| = 14.4131
f := f_low + 122*(f_high - f_low)/255
C_stray = 1e-15
L = 3e-8
f = 212.989
10^-6/(2*π*sqrt(L*C_stray)) = 29057.6
# Coil/T line impedance at resonance
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# Magnitude output
|Zleg1[128]| = 20.1837
C_pF = 17.7
# Tune capacitance
knob ≡ .885
# by varying 'knob' to get symmetric curve
(|Vout[0]| - |Vout[NBINS]|)*10^5 = 2.48343  # < == get this number close to zero
# Real part output
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1
phi ≡ 6.1319  # Phase shift, degrees
# Tune the real part output by
# adjusting the phase , phi
(Re(Vout[0]) - Re(Vout[NBINS]))*10^5 = 0.0108885  # <= make this number close to zero
# Lowest scan frequency MHz
f_low ≡ f - .25
# Highest scan frequency MHz
f_high ≡ f + .25
n ≡ 1  # step size in units dω,n=1 at end
# Current drawn from signal generator
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# Coil current mA
IRF[128] - Re(Vout[128])/R_1 = 0.111326 + 0.000387289i
# If there is stray capacitance in parallel with the coil, then
# this current will be split and shared between them in the ratio
# of their impedances
Icoil[k] := (ZCstray[k]/(ZCstray[k] + ZLpure[k]))*(IRF[128] - Re(Vout[128])/R_1)
ZCstray[128]/(ZCstray[128] + ZLpure[128]) = 1.00005 - 4.68464e-7i
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y
Icoil[128] = 0.111332 + 0.000387258i
|Icoil[128]| = 0.111333
# Use this as estimate of Transmission line current in TE signal
# Here is the impedance of the cable/coil combination
ZT[0] = 9.55385 + 37.1245i
ZT[128] = 9.95252 + 39.1685i
ZT[255] = 10.3867 + 41.2782i
Vout[0] = 2.33482 - 0.178415i
|Vout[0]| = 2.34162
coil ≡ "current.dat"
backreal ≡ "Backreal.dat"
backgrnd ≡ "Backgrnd.dat"
p := sqrt(Re(Vout)^2 + Im(Vout)^2)
q := sqrt(Re(Icoil)^2 + Im(Icoil)^2)
# [component: inputs Re(Vout)]
# [component: inputs q]
# [component: inputs p]
