# Proton at 214 MHz with 7 l/2 cable
# WITH  stray capacitance to ground in coil BUT INCLUDE NON- CONSTANT COIL CURRENT
U := .1  # 100 mV RF input  # file s214ncc6.mcd
# "THIS IS MATHCAD 6+ VERSION
# Inductance of coil  30 nH
r := 10  # Damping resistor
L_0 := 3.*10^-8
R_coil := .35
f := 213*10^6
ω_res := 2*π*f  # Tuning Cap, pF
Cmain := 20*10^-12*knob
# Ideal Constant current, mA
I := U*1000/R
I = 0.161551
C_stray*10^12 = 0.001  # pF
ω_low := 2*π*(213 - .25)*10^6
ω_hi := 2*π*(213 + .25)*10^6
# 500 KHz scan width centred on 214 MHz
ω_res*L_0/R_coil = 114.713
slope := δC/(.25*2*π*10^6)
slopeϕ := δϕ/(.25*2*π*10^6)  # trim phase in degrees
C_trim(ω) := slope*(ω - ω_res)
C(ω) := Cmain + C_trim(ω)*10^-12
C_pF := C(ω_res)*10^12
C_pF = 17.7
# Cable characteristics:
α := .0343  # My estimate Aug 97
β_1 := 4.752*10^-9  # My estimate Aug 97
β(ω) := β_1*ω
S := 2*50*α  # 50 = cable impedance
S = 3.43  # Ohms/m
D := 10.27*10^-11  # F/m
M := 2.542*10^-7  # H/m
Z_0(ω) := sqrt((S + ω*M*1i)/(ω*D*1i))  # Need this as function of frequency
Z_0(ω_res) = 49.7517 - 0.250799i
vel := 1/β(1)
vel = 210437710
# Length of cable
λ(ω) := vel/f
l := trim*λ(ω_res)
l = 3.4579
S*l = 11.8606  # Resistance at resonance
l(ω) := l + δl  # Cable length. Chance to trim cable length to see effects
Γ(ω) := α + 1i*β(ω)
δω := 2*π*500*10^3/256
Z_c(ω) := 1/(1i*ω*C(ω))
k := 0, 1 .. 255
x[k] := ω_low + k*δω
# [component: inputs x]
ω_temp := x[nback]
Z_0(ω_low) = 49.7517 - 0.251094i
# This part ot the program reads the data from the disk for the background (created in part one) and the experimental data for the proton resonance and plots the information as a continuous function (hence the "interp" function):
# Imaginary part of susceptibility | dispersion term calculated with Hill & Hill method
# [component: outputs butxi]
# [component: outputs butxii]
# [component: outputs Vreal]
# [component: outputs Vback]
Vreal[0] = 2.33482
ichi := lspline(x, butxii)
background := lspline(x, Vback)
Vback[0] = 2.34162
rchi := lspline(x, butxi)
b(ω) := interp(background, x, Vback, ω)
x = [
    1.33675e9; 1.33676e9; 1.33677e9; 1.33678e9; 1.3368e9; 1.33681e9; 1.33682e9; 1.33683e9; 1.33685e9; 1.33686e9
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]
butxii = [
    0.00252248; 0.00061347; 0.0013159; 0.00203139; 0.0027598; 0.00336713; 0.00425421; 0.00381684; 0.00325774; 0.00257678
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]
realback := lspline(x, Vreal)
rb(ω) := interp(realback, x, Vreal, ω)
ω := ω_low, ω_low + δω .. ω_hi
rb(ω_low) = 2.33482
x_2(ω) := interp(ichi, x, butxii, ω)
x_1(ω) := interp(rchi, x, butxi, ω)
chi(ω) := x_1(ω) - 1i*x_2(ω)
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# Input estimate of coil current in two stages. On first pass put in constant TE  current estimated from
# calculation.  Then output the current i(ω) into file a:current.dat. Use this as input for current
# estimate on next iteration. See if everything converges
Icoil_TE := 0.11133  # mA
# [component: outputs Icoil]
# On next iteration read in
# iterated current READ(current.dat)
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# define a coil current function
coil := lspline(x, Icoil)
i_c(ω) := interp(coil, x, Icoil, ω)
# associate to current.dat
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# Parameterise the transition probability
p_T(ω) := (i_c(ω)/Icoil_TE)
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# Feed this into inductance
L(ω) := L_0*(1 + sign*4*π*eta*p_T(ω)*chi(ω))
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Z_Lpure(ω) := 1i*ω*L(ω) + R_coil
Z_stray(ω) := 1/(1i*ω*C_stray)
Z_L(ω) := Z_Lpure(ω)*Z_stray(ω)/(Z_Lpure(ω) + Z_stray(ω))
Z_Lpure(ω_res) = -4.83272 + 40.8482i
Z_T(ω) := Z_0(ω)*(Z_L(ω) + Z_0(ω)*tanh(Γ(ω)*l(ω)))/(Z_0(ω) + Z_L(ω)*tanh(Γ(ω)*l(ω)))
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Z_T(ω_res) = 5.05471 + 40.8192i
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Z_leg1(ω) := r + Z_c(ω) + Z_T(ω)
Z_total(ω) := R_1/(1 + R_1/Z_leg1(ω))
|Z_leg1(ω_low)| = 20.25
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xp_2 := ω_res
xp_3 := ω_hi
# Add parabolic term
xp_1 := ω_low
yp_1 := 0
yp_2 := δphase
yp_3 := 0
α_1 := yp_1 - yp_2
α_2 := yp_1 - yp_3
β_1 := xp_1^2 - xp_2^2
Γ_1 := xp_1 - xp_2
β_2 := xp_1^2 - xp_3^2
Γ_2 := xp_1 - xp_3
temp := (β_1*(Γ_2/Γ_1) - β_2)
a := (Γ_2*(α_1/Γ_1) - α_2)/temp
bb := (α_2 - a*β_2)/Γ_2
c := yp_1 - a*xp_1^2 - bb*xp_1
parfaze(ω) := a*ω^2 + bb*ω + c
ϕ_trim(ω) := slopeϕ*(ω - ω_res) + parfaze(ω)
ϕ(ω) := ϕ_trim(ω) + phi
# Recall I is in mA
V_out(ω) := I*Z_total(ω)*exp(1i*ϕ(ω)*π/180)
# output voltage mV
ω_p1 := 2*π*(214 - .125)*10^6
ω_p2 := 2*π*(214 + .125)*10^6
ω_p1 := ω_res
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Peaka := Re(V_out(ω_p1)) - rb(ω_p1)
Re(V_out(ω_p1)) = 1.87564
Re(V_out(ω_p2)) = 7.31178
Peakb := Re(V_out(ω_p2)) - rb(ω_p2)
(Peaka - Peakb)*100/Peaka = 4808.31
# %
xx := ω_res
# Calculation of the modulation level (note that it is normalised)
M_m := (|V_out(xx)| - b(xx))/b(xx)
M_r := (Re(V_out(xx)) - rb(xx))/rb(xx)
q := integral((|V_out(ω)| - b(ω))*(-1), ω = ω_low .. ω_hi)
# Calculation of the polarisation by integrating the area between the background and the resonance signal ("p" and "q")
p := integral((Re(V_out(ω)) - rb(ω))*1, ω = ω_low .. ω_hi)
# Real part of the modulation
M_r = -0.194466
# Magnitude of the modulation
M_m = -0.193943
(Peaka - Peakb)*100/Peaka = 4808.31
# Assymetry | %
# Now follow the signal through the BRM
ϕ_2 := 10
# These phase angles are all in degrees
ϕ_1(ω) := 0 + ϕ_2
V_c := 1
A := 1.0001
V(ω) := V_c*V_out(ω)*A*exp(1i*((ϕ_1(ω) - ϕ_2)*π/180))
# There is a fixed phase change going thro BRM ???
l(ω_res) = 3.4579
# ====================== Fit parabolic background =======================
nback ≡ 20  # Choose point clear of signal for background
ω_back := ω_temp
xp_1 := ω_low
yp_1 := Re(V_out(ω_low))
xp_3 := ω_hi
yp_3 := Re(V_out(ω_hi))
xp_2 := ω_back
yp_2 := Re(V_out(ω_back))
α_1 := yp_1 - yp_2
β_1 := xp_1^2 - xp_2^2
Γ_1 := xp_1 - xp_2
α_2 := yp_1 - yp_3
β_2 := xp_1^2 - xp_3^2
Γ_2 := xp_1 - xp_3
temp := (β_1*(Γ_2/Γ_1) - β_2)
a := (Γ_2*(α_1/Γ_1) - α_2)/temp
b := (α_2 - a*β_2)/Γ_2
c := yp_1 - a*xp_1^2 - b*xp_1
parab(ω) := a*ω^2 + b*ω + c
pp := integral((Re(V_out(ω)) - parab(ω))*sign, ω = ω_low .. ω_hi)
pp = 207645
parab(ω_low) = 2.33715
parab(ω_hi) = 2.3361
# ===========================================================================
# Find normal constant current due to resistive elements only, i.e. cable rsistance, coil resistance  and damping resistor in parallel with amplifier input impedance and all this in series with R, constant current resistor
R_leg1 := r + S*l(ω_res) + R_coil
R_inv := 1/R_1 + 1/R_leg1
I_max := U*1000/(1/R_inv + R)
M_rp := (Re(V_out(ω_res)) - parab(ω_res))/parab(ω_res)  # NEW TE SIGNAL
# magnitude of modulation
5/400 = 0.0125
# Resistance change of coil
# Main working page. Can change the
# parameters here and see the effects
# on the signal
sign*4*π*eta*ω_res*L_0*x_2(ω_res) = -5.1826
# Amp impedance
R_1 ≡ 50
R ≡ 619
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# Output voltage in mV WARN.. must not go -ve !
const ≡ 1
knob ≡ 0.885
phi ≡ 6.1319
δl ≡ 0
δC ≡ 0
δϕ ≡ 0
eta ≡ 0.00001*2.6*400
δphase ≡ 0
nback ≡ 240
trim ≡ 7*0.5
sign ≡ -1
C_stray ≡ .001*10^-12
Re(V_out(ω_low)) = 2.33715
# Polarisation using parab
pp = 207645
C_stray*10^12 = 0.001  # pF  # Constant current R  # Polarisation using Q curve background
R = 619
p = -194818
# Modulation with parabola background | Modulation with Q curve background
M_rp = -0.196276
M_r = -0.194466
I_const(ω) := U*1000/(R + Z_total(ω))  # Current drawn from RF source, mA
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# Current through amplifier
# Current through T-line Be carefull to keep
# true imaginary part
# the Q meter output only
# shows us the REAL part !
I_temp(ω) := I_const(ω) - Re(V_out(ω))/R_1
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# Coil current estimated on this pass. The current is split between the coil and the stray impedance in the ratio of their impedances
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I_coil(ω) := Z_stray(ω)/(Z_Lpure(ω) + Z_stray(ω))*I_temp(ω)
# Coil current mA
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I_temp(ω_res) = 0.121069 + 0.000207271i
Z_stray(ω_res) = -747206i
Z_Lpure(ω_res) = -4.83272 + 40.8482i
|Z_stray(ω_res)/(Z_Lpure(ω_res) + Z_stray(ω_res))| = 1.00005
I_coil(ω_res) = 0.121076 + 0.000208065i
I_coil(ω_low) = 0.111178 + 0.000721482i
# Output coil current function of frequency to input in next iteration
# Calculate level of failure
WRITEPRN(current_dat) := Re(I_coil(ω))  # error: This variable is undefined.
|(I_coil(ω_low) - I_coil(ω_res))/I_coil(ω_low)|*100 = 8.91453  # %
coil ≡ "current.dat"
